Wed Apr  8 14:24:25 EDT 2015
$PROBLEM    RUN# ecomp1_pkpd EFFECT COMP POPULATION PK-PD MODEL 1
$INPUT      ID TIME CMT DV AMT TYPE
;TYPE 0 = PK, TYPE 1=PD

;CMT 1=GUT, 2=CENTRAL, 3=EFFECT

;DV =PK & PD ORDERED BY ID, TIME
$DATA       dat1.csv IGNORE=@
$SUBROUTINE ADVAN3 TRANS1
$PK
 CL=THETA(1)*EXP(ETA(1))
 V=THETA(2)
 KE0=THETA(3)

 K=CL/V
 K12=K*0.0001 ;NEGLIGIBLE MASS TRANSFER
 K21=KE0
 S1=V
 S2=V*K12/K21  ;AS SS CE = CP

$ERROR
 CE=A(2)/S2
 CP=A(1)/V
 EMAX=THETA(4)
 EC50=THETA(5)
  CONC=F
 EFF= EMAX*F/(EC50+F) + ERR(2)

Y=CONC*(1-TYPE) + EFF*TYPE
SID=IREP
TYP2=TYPE
IPRED=Y

$THETA  (0,0.1) ; CL
 (0,1) ; V
 (0,0.1) ; KE0
 (0,100) ; EMAX
 (0,1) ; EC50
$OMEGA  0  FIX
$SIGMA  0.01
 1
;$SIMULATION (6546) ONLY SUB=20
$SIMULATION ONLYSIM (123456)
;$COV
$TABLE      NOPRINT FILE=all001 ONEHEADER ID TIME TYPE CMT CL V KE0 CE
            CP CONC EFF

NM-TRAN MESSAGES
 WARNINGS AND ERRORS (IF ANY) FOR PROBLEM    1
 (WARNING  2) NM-TRAN INFERS THAT THE DATA ARE POPULATION.
 (WARNING  32) $SIGMA INCLUDES A NON-FIXED INITIAL ESTIMATE CORRESPONDING TO
 AN EPS (OR ERR) THAT IS NOT USED IN ABBREVIATED CODE.
Note: The following floating-point exceptions are signalling: IEEE_INVALID_FLAG IEEE_DIVIDE_BY_ZERO

1NONLINEAR MIXED EFFECTS MODEL PROGRAM (NONMEM) VERSION 7.3.0
 ORIGINALLY DEVELOPED BY STUART BEAL, LEWIS SHEINER, AND ALISON BOECKMANN
 CURRENT DEVELOPERS ARE ROBERT BAUER, ICON DEVELOPMENT SOLUTIONS,
 AND ALISON BOECKMANN. IMPLEMENTATION, EFFICIENCY, AND STANDARDIZATION
 PERFORMED BY NOUS INFOSYSTEMS.
 PROBLEM NO.:         1
 RUN# ecomp1_pkpd EFFECT COMP POPULATION PK-PD MODEL 1
 TOT. NO. OF OBS RECS:       98
 TOT. NO. OF INDIVIDUALS:      2
 TWO COMPARTMENT MODEL (ADVAN3)
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 SIMULATION STEP PERFORMED
 #CPUT: Total CPU Time in Seconds,        0.022
